<?xml version="1.0" encoding="UTF-8"?>
<neuroml xmlns="http://www.neuroml.org/schema/neuroml2" id="private-model">
    <include href="private.cell.nml"/>
    <cell id="cell1">
        <morphology id="m1">
            <segment id="s1" x="1"/>
        </morphology>
    </cell>
    <network id="net1">
        <population id="pop1" component="cell" size="10"/>
        <projection id="proj1" presynapticPopulation="pop1" postsynapticPopulation="pop1" synapse="syn1">
            <connection id="c1"/>
        </projection>
        <inputList id="inputs">
            <input id="i1"/>
        </inputList>
    </network>
    <alphaSynapse id="syn1" tauRise="private"/>
</neuroml>
